units real
atom_style full

dimension 3
boundary p p p

bond_style hybrid harmonic
angle_style hybrid harmonic
dihedral_style hybrid multi/harmonic nharmonic
improper_style hybrid harmonic
special_bonds lj 0.0 0.0 1.0 coul 0.0 0.0 1.0

read_data modelTrappKara_residues_noH_replicate_converted.lmp

pair_style lj/cut/coul/long 9.0 9.0
pair_modify tail yes
kspace_style pppm 1e-8

pair_coeff 1 1   0.1947459   3.7500000
pair_coeff 2 2   0.0914113   3.9500000
pair_coeff 3 3   0.0198720   4.6800000

pair_modify mix arithmetic

thermo_style custom ebond eangle edihed eimp epair evdwl ecoul elong etail pe

run 0
